# Antal af huller på hver bremseskive
FSH5 := 48
BSH5 := 56
SH6 := 56
# Den målte omkreds på hjulet
OHjul := 683 cm
# Afstand tilbage lagt pr hul
FSPH5 := OHjul/FSH5 = 0.142292 m
BSPH5 := OHjul/BSH5 = 0.121964 m
SPH6 := OHjul/SH6 = 0.121964 m
# Teoretisk test fart ved brug af frekvens pr hul
# Test frekvens
tf := 350*Hz
VFbil5 := FSPH5*tf = 179.287 km/hr
Vbil6 := SPH6*tf = 153.675 km/hr
# Teoretisk måling af hastighed i graf
VFbil5(fz) := FSPH5*fz*Hz
Vbil6(fz) := SPH6*fz*Hz
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